// COMSOL Multiphysics 6.2.0.260 model "fire_effects_cooling.mph"
// Action on Structures Exposed to Fire — Cooling Process
// This verification example from DIN EN 1991-1-2 describes a cooling process due to convection. The results are compared to the reference values from the European Standard.
// Outline of the model tree

Functions
  int1: Interpolation "Reference temperature" | funcname = Tref; table = {{0, 1000}, {60, 999.3}, {300, 891.8}, {600, 717.7}, {900, 574.9}, {1200, 460.4}, {1500, 368.7}, {1800, 295.3}}; fununit = degC; argunit = s

Geometry
  geom1 "Geometry 1" (2D, length unit m)
    sq1: Square
    pt1: Point | p = {0.5, 1}
    fin: Finalize "Form Union"

Materials
  mat1: Common "Material 1" on all domains
    def "Basic"
      thermalconductivity = 1
      density = 1000
      heatcapacity = 1

Physics
  ht: HeatTransfer "Heat Transfer in Solids" on all domains
    dependent variable T
    solid1: SolidHeatTransferModel "Solid 1" (default)
    init1: init "Initial Values 1" (default) | Tinit = 1000[degC]
    ins1: ThermalInsulation (default)
    hf1: HeatFluxBoundary "Heat Flux 1" on boundaries 2 | HeatFluxType = ConvectiveHeatFlux; h = 1; Text = 0[degC]

Mesh
  mesh1 "Mesh 1" (physics-controlled)

Studies
  std1 "Study 1"
    time: Transient "Time Dependent" | tunit = min; tlist = {0, 1, 5, 10, 15, 20, 25, 30}; usertol = on; rtol = 1e-5

Solver configurations
  sol1 "Solution 1" (study std1)
    v1: Variables "Dependent Variables 1"
    t1: Time "Time-Dependent Solver 1"
      tlist = {0, 1, 5, 10, 15, 20, 25, 30}
      atolmethod = {comp1_T, global}
      atolvaluemethod = {comp1_T, factor}
      atol = {comp1_T, 1e-3}
      maxorder = 2
      estrat = exclude
      fc1: FullyCoupled
        linsolver = d1
        damp = 0.9
        jtech = once
        stabacc = aacc
        aaccdim = 5
        aaccmix = 0.9
        aaccdelay = 1
      d1: Direct "Direct, heat transfer variables (ht)" | linsolver = pardiso; pivotperturb = 1.0E-13

Datasets
  dset1: Solution | solution = sol1

Derived values
  gev1: EvalGlobal "Global Evaluation: Reference temperature"
    data = dset1
    table = tbl1
    expr = Tref(t)
    unit = degC
    descr = Reference temperature
  pev1: EvalPoint "Point Evaluation: Temperature" on points 3
    data = dset1
    table = tbl1
    expr = T
    unit = degC
    descr = Temperature
  pev2: EvalPoint "Absolute and Relative Error" on points 3
    data = dset1
    table = tbl2
    expr = {abs(T-Tref(t)), abs(T-Tref(t))/(Tref(t)-273.15[K])}
    unit = {K, %}
    descr = {Absolute error, Relative error}

Tables
  tbl1: Table
    // Global Evaluation: Reference temperature
    Time (min) | Reference temperature (degC) | Temperature (degC), Point: 3
    0 | 1000 | 1000
    1 | 999.3 | 999.277
    5 | 891.8 | 891.821
    10 | 717.7 | 717.675
    15 | 574.9 | 574.853
    20 | 460.4 | 460.379
    25 | 368.7 | 368.694
    30 | 295.3 | 295.261
  tbl2: Table
    // Absolute and Relative Error
    Time (min) | Absolute error (K), Point: 3 | Relative error (%), Point: 3
    0 | 1.02318e-12 | 1.02318e-13
    1 | 0.0233558 | 0.00233722
    5 | 0.0212623 | 0.0023842
    10 | 0.0246269 | 0.00343137
    15 | 0.0466454 | 0.00811365
    20 | 0.0207922 | 0.00451612
    25 | 0.00553881 | 0.00150225
    30 | 0.0394212 | 0.0133496

Plots
  pg1: PlotGroup2D "Temperature (ht)" | data = dset1
    surf1: Surface | expr = T; unit = degC
  pg2: PlotGroup1D "Temperature" | data = none
    tblp1: Table "Table Graph 1" | table = tbl1